** cdm3d CONTACT ? test_9col_full ? sinh tu dong, xem scripts/cdm3d/contact_ccx_input.py
** zone=KE  mu=0.1961  don vi: kN-m-s (kPa)
*NODE, NSET=NALL
1, -1.400000, -1.800000, -24.000000
2, -1.400000, -0.000000, -24.000000
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*ELEMENT, TYPE=C3D4, ELSET=SOIL_dat_dap
1, 2032, 10004, 1925, 10005
2, 1685, 9927, 2265, 9940
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*ELEMENT, TYPE=C3D4, ELSET=SOIL_dat_yeu
4829, 11446, 16111, 7782, 16807
4830, 15003, 15351, 14905, 22656
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*ELEMENT, TYPE=C3D4, ELSET=SOIL_lop_cung
122594, 24515, 25108, 27329, 27791
122595, 25936, 25952, 25934, 25953
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*ELEMENT, TYPE=C3D4, ELSET=CDM_COLUMN
150071, 28974, 28177, 29090, 28870
150072, 29090, 28992, 28974, 28870
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*MATERIAL, NAME=MAT_SOIL_dat_dap
*ELASTIC
8000.000, 0.300
*DENSITY
1.936799
*SOLID SECTION, ELSET=SOIL_dat_dap, MATERIAL=MAT_SOIL_dat_dap
*MATERIAL, NAME=MAT_SOIL_dat_yeu
*ELASTIC
3450.000, 0.350
*DENSITY
1.558716
*SOLID SECTION, ELSET=SOIL_dat_yeu, MATERIAL=MAT_SOIL_dat_yeu
*MATERIAL, NAME=MAT_SOIL_lop_cung
*ELASTIC
27600.000, 0.350
*DENSITY
1.936799
*SOLID SECTION, ELSET=SOIL_lop_cung, MATERIAL=MAT_SOIL_lop_cung
*MATERIAL, NAME=MAT_CDM_COLUMN
*ELASTIC
40000.000, 0.250
*DENSITY
1.834862
*SOLID SECTION, ELSET=CDM_COLUMN, MATERIAL=MAT_CDM_COLUMN
*NSET, NSET=BASE
49, 50, 51, 52, 1151, 1152
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*NSET, NSET=SIDE_XMIN
10, 11, 12, 13, 36, 37
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*NSET, NSET=SIDE_XMAX
14, 15, 16, 26, 38, 39
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*NSET, NSET=SIDE_YMIN
10, 11, 14, 15, 36, 38
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*NSET, NSET=SIDE_YMAX
12, 13, 16, 26, 37, 39
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*NSET, NSET=COLTOP
28106, 28108, 28110, 28112, 28114, 28116
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*SURFACE, NAME=SOIL_INNER, TYPE=ELEMENT
4031, S2
4164, S1
3450, S3
3569, S1
4178, S1
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135868, S1
*SURFACE, NAME=COL_LATERAL, TYPE=ELEMENT
150976, S3
150919, S3
150798, S4
150798, S1
150768, S3
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160044, S1
*SURFACE INTERACTION, NAME=SOIL_COL_INT
*SURFACE BEHAVIOR, PRESSURE-OVERCLOSURE=HARD
*FRICTION
0.1961, 100000.000
*CONTACT PAIR, INTERACTION=SOIL_COL_INT, TYPE=NODE TO SURFACE, ADJUST=0.02
SOIL_INNER, COL_LATERAL
*BOUNDARY
BASE, 1, 3
SIDE_XMIN, 1, 1
SIDE_XMAX, 1, 1
SIDE_YMIN, 2, 2
SIDE_YMAX, 2, 2
*STEP, NLGEOM
*STATIC
*CLOAD
11, 3, -14.781634
12, 3, -14.781634
15, 3, -14.781634
16, 3, -14.781634
17, 3, -0.522836
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32210, 3, -2.381771
*NODE FILE
U
*EL FILE
S, E
*END STEP
*STEP, NLGEOM
*STATIC
*CLOAD
11, 3, -17.680619
12, 3, -17.680619
15, 3, -37.750510
16, 3, -37.750510
17, 3, -0.894642
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32210, 3, -4.967629
*NODE FILE
U
*EL FILE
S, E
*END STEP
*STEP, NLGEOM
*STATIC
*CLOAD
11, 3, -14.017067
12, 3, -14.017067
15, 3, -59.891104
16, 3, -59.891104
17, 3, -1.111260
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32210, 3, -7.101417
*NODE FILE
U
*EL FILE
S, E
*END STEP
*STEP, NLGEOM
*STATIC
*CLOAD
15, 3, -36.954086
16, 3, -36.954086
18, 3, -1.322646
19, 3, -1.698872
22, 3, -1.057287
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32210, 3, -5.954429
*NODE FILE
U
*EL FILE
S, E
*END STEP
