** cdm3d ? test_ccx_mc ? sinh tu dong, xem scripts/cdm3d/ccx_input.py
** zone=KE  element=C3D4  don vi: kN-m-s (kPa)
*NODE, NSET=NALL
1, -4.000000, -4.000000, 0.000000
2, -4.000000, -4.000000, 0.800000
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*ELEMENT, TYPE=C3D4, ELSET=SOIL_dat_dap
1, 283, 1462, 344, 1465
2, 309, 1465, 371, 1466
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*ELEMENT, TYPE=C3D4, ELSET=CDM_COLUMN
664, 360, 388, 371, 1479
665, 366, 370, 381, 1479
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*ELEMENT, TYPE=C3D4, ELSET=SOIL_dat_yeu
776, 1959, 2065, 1698, 2949
777, 2429, 2613, 1841, 2640
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*ELEMENT, TYPE=C3D4, ELSET=SOIL_lop_cung
20309, 3905, 4001, 3872, 4207
20310, 3800, 3915, 4043, 4140
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*MATERIAL, NAME=MAT_SOIL_dat_dap
*ELASTIC
8000.000, 0.300
*DENSITY
1.936799
*SOLID SECTION, ELSET=SOIL_dat_dap, MATERIAL=MAT_SOIL_dat_dap
*MATERIAL, NAME=MAT_CDM_COLUMN
*ELASTIC
40000.000, 0.250
*DENSITY
1.834862
*SOLID SECTION, ELSET=CDM_COLUMN, MATERIAL=MAT_CDM_COLUMN
*MATERIAL, NAME=MAT_SOIL_dat_yeu
*ELASTIC
3450.000, 0.350
*MOHR COULOMB
0.000, 0.000, 293.
*MOHR COULOMB HARDENING
12.938, 0., 293.
*DENSITY
1.558716
*SOLID SECTION, ELSET=SOIL_dat_yeu, MATERIAL=MAT_SOIL_dat_yeu
*MATERIAL, NAME=MAT_SOIL_lop_cung
*ELASTIC
27600.000, 0.350
*DENSITY
1.936799
*SOLID SECTION, ELSET=SOIL_lop_cung, MATERIAL=MAT_SOIL_lop_cung
*NSET, NSET=SIDE_XMIN
1, 2, 3, 4, 11, 12
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*NSET, NSET=SIDE_YMIN
1, 2, 5, 6, 11, 13
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*NSET, NSET=TOP_SOIL
2, 3, 6, 7, 8, 21
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*NSET, NSET=SIDE_YMAX
3, 4, 7, 9, 12, 14
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*NSET, NSET=SIDE_XMAX
5, 6, 7, 9, 13, 14
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*NSET, NSET=TOP_COLUMN
8, 39, 40, 41, 42, 43, 44, 45, 46, 381
382, 383, 384
*NSET, NSET=BASE
16, 17, 18, 19, 207, 208
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*BOUNDARY
BASE, 1, 3
SIDE_XMIN, 1, 1
SIDE_XMAX, 1, 1
SIDE_YMIN, 2, 2
SIDE_YMAX, 2, 2
*NSET, NSET=ORPHAN
381, 382, 383, 384, 385, 386
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*STEP
*STATIC
*NODE FILE
U
*END STEP
*STEP, NLGEOM
*STATIC
*MODEL CHANGE, TYPE=ELEMENT, REMOVE
CDM_COLUMN
*BOUNDARY
ORPHAN, 1, 3
*NODE FILE
U
*END STEP
*STEP, NLGEOM
*STATIC
*MODEL CHANGE, TYPE=ELEMENT, ADD
CDM_COLUMN
*BOUNDARY, OP=NEW
BASE, 1, 3
SIDE_XMIN, 1, 1
SIDE_XMAX, 1, 1
SIDE_YMIN, 2, 2
SIDE_YMAX, 2, 2
*NODE FILE
U
*END STEP
*STEP, NLGEOM
*STATIC
*CLOAD
2, 3, -15.929426
3, 3, -15.929426
6, 3, -15.929426
7, 3, -15.929426
8, 3, -0.639498
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384, 3, -0.984684
*NODE FILE
U
*EL FILE
S, E
*END STEP
*STEP, NLGEOM
*STATIC
*CLOAD
2, 3, -14.187145
3, 3, -14.187145
6, 3, -45.548201
7, 3, -45.548201
8, 3, -1.262010
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384, 3, -1.891825
*NODE FILE
U
*EL FILE
S, E
*END STEP
*STEP, NLGEOM
*STATIC
*CLOAD
2, 3, -3.982356
3, 3, -3.982356
6, 3, -75.664771
7, 3, -75.664771
8, 3, -1.742633
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384, 3, -2.565807
*NODE FILE
U
*EL FILE
S, E
*END STEP
*STEP, NLGEOM
*STATIC
*CLOAD
6, 3, -39.823564
7, 3, -39.823564
8, 3, -1.598746
31, 3, -69.437225
32, 3, -58.348866
34, 3, -69.752112
35, 3, -61.097645
36, 3, -59.735346
37, 3, -67.767551
38, 3, -57.960756
39, 3, -2.163006
40, 3, -2.967006
45, 3, -2.396885
46, 3, -2.965197
234, 3, -103.253774
235, 3, -105.718558
238, 3, -112.388610
240, 3, -107.151260
246, 3, -27.012633
247, 3, -25.894812
248, 3, -2.132625
249, 3, -3.275989
250, 3, -29.028042
251, 3, -8.391565
253, 3, -2.668847
254, 3, -2.123607
256, 3, -31.948766
257, 3, -2.440238
258, 3, -3.124678
259, 3, -5.592317
260, 3, -2.712837
261, 3, -7.212718
262, 3, -6.414997
263, 3, -16.735243
266, 3, -89.747222
267, 3, -88.327749
273, 3, -9.140534
283, 3, -7.434332
284, 3, -5.127312
285, 3, -6.423585
286, 3, -4.748954
287, 3, -3.626673
288, 3, -3.066203
289, 3, -12.554627
290, 3, -1.555696
292, 3, -2.732613
382, 3, -2.713059
384, 3, -2.461711
*NODE FILE
U
*EL FILE
S, E
*END STEP
